<?xml version="1.0" encoding="UTF-8"?>
<networkml xmlns="http://morphml.org/networkml/schema" xmlns:meta="http://morphml.org/metadata/schema" xmlns:xsi="http://www.w3.org/2001/XMLSchema-instance" xsi:schemaLocation="http://morphml.org/networkml/schema  http://www.neuroml.org/NeuroMLValidator/NeuroMLFiles/Schemata/v1.8.1/Level3/NetworkML_v1.8.1.xsd" lengthUnits="micrometer">

<meta:notes>

Network structure (NeuroML 1.x) for project: PN2RS_allORNs saved with neuroConstruct v1.6.0 on: 09:48:13, 02-Feb-16

Cell Group: neuron_PN2_RS_sk_480245 contains 1 cells

</meta:notes>

<meta:properties>
    <meta:property tag="neuroConstruct_random_seed" value="-9223372036854775808"/>

    <meta:property tag="neuroConstruct_sim_config" value="Default Simulation Configuration"/>

    <meta:property tag="neuroConstruct_sim_duration" value="100.0"/>

    <meta:property tag="neuroConstruct_sim_time_step" value="0.025"/>

    <meta:property tag="neuroConstruct_temperature" value="6.3"/>
</meta:properties>

        <populations>
    <population name="neuron_PN2_RS_sk_480245" cell_type="neuron_PN2_RS_sk_480245">
        <meta:properties>

        </meta:properties>
        <instances size="1">
            <instance id="0">
                <location x="0.0" y="0.0" z="0.0"/>
            </instance>
        </instances>
    </population>
</populations>

            <!--There are no synaptic connections present in the network-->

        <inputs units="Physiological Units">
    <input name="398576">
        <random_stim frequency="0.02" synaptic_mechanism="DoubExpSynA"/>
        <target population="neuron_PN2_RS_sk_480245">
            <sites size="30">
                <site cell_id="0" segment_id="15124" fraction_along="0.5"/>
                <site cell_id="0" segment_id="23259" fraction_along="0.5"/>
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            </sites>
        </target>
    </input>
    <input name="395984">
        <random_stim frequency="0.02" synaptic_mechanism="DoubExpSynA"/>
        <target population="neuron_PN2_RS_sk_480245">
            <sites size="10">
                <site cell_id="0" segment_id="8926" fraction_along="0.5"/>
                <site cell_id="0" segment_id="11841" fraction_along="0.5"/>
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            </sites>
        </target>
    </input>
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</inputs>

</networkml>
